// COMSOL Multiphysics 5.6.0.401 model "telescope_and_lens.mph"
// Outline of the model tree

Parameters
  nix = 0
  niy = 0
  niz = 1
  f1 = 100[mm]
  Te_1 = 3.21[mm]
  d_1 = lens_size
  cc_1 = 1
  T_1 = f1+f2
  dS_o = lens_size
  dS_i = 5[mm]
  T_S = f1
  f2 = 400[mm]
  Te_2 = 3.21[mm]
  d_2 = lens_size
  cc_2 = 0
  T_2 = 50[mm]
  f3 = 50[mm]
  Te_3 = 3.21[mm]
  lambda = 729[nm]
  lens_size = 1[inch]
  dx = 0[mm]
  dy = 0[mm]
  d_3 = lens_size
  cc_3 = 1
  T_3 = f3
  dz = -10[mm]
  D_in = 3[mm]
  N_ring = 10  // number of hexapolar rings
  theta_x = 0[rad]
  theta_y = 0[rad]
  vx = tan(theta_x)
  vy = tan(theta_y)
  vz = 1

Geometry
  geom1 "Telescope and lens" (3D, length unit mm)
    pi1: PartInstance "Lens 1"
      part = part1
      inputname = {f, nref, Te, d, nix, niy, niz, cc, n_extra_r, n_extra_a}
      inputexpr = {f1, 1.5, Te_1, d_1, 0, 0, 1, cc_1, 0, 0}
      inputvalue = {100.0 [mm], 1.5, 3.21 [mm], 25.4 [mm], 0.0, 0.0, 1.0, 1.0, 0.0, 0.0}
      selnamepnt = Surface 1 vertex
      selshowpnt = on
      seltagpnt = pi1_unisel6
      selnamebnd = {Exterior, Surface 1, Surface 2, Edges}
      selcontributetobnd = {csel2, csel1, csel1, csel6}
      selshowbnd = {on, on, on, on}
      seltagbnd = {pi1_unisel2, pi1_unisel3, pi1_unisel4, pi1_unisel5}
      selnamedom = All
      selcontributetodom = csel3
      selshowdom = on
      seltagdom = pi1_unisel1
      argunit = {m, , m, m, , , , , , }
      lengthunit = mm
      outputwptag = {wp1, wp2, wp3}
      outputwpmatrix = 
        {0, 0, 0, 1, 0, 0, 0, 1, 0}
        {0, 0, 0.00484978908235, 1, 0, 0.00484978908235, 0, 1, 0.00484978908235}
        {0, 0, 0.00321, 1, 0, 0.00321, 0, 1, 0.00321}
    pi2: PartInstance "Stop"
      part = part2
      inputname = {d0, d1, nix, niy, niz}
      inputexpr = {dS_o, dS_i, 0, 0, 1}
      inputvalue = {25.4 [mm], 5.0 [mm], 0.0, 0.0, 1.0}
      workplanesrc = pi1
      workplane = wp2
      displ = {0, 0, T_S}
      selnamebnd = All
      selcontributetobnd = csel7
      selshowbnd = on
      seltagbnd = pi2_sel1
      argunit = {m, m, , , }
      lengthunit = mm
      outputwptag = wp1
      outputwpmatrix = {0, 0, 0, 1, 0, 0, 0, 1, 0}
    pi3: PartInstance "Lens 2"
      part = part1
      inputname = {f, nref, Te, d, nix, niy, niz, cc, n_extra_r, n_extra_a}
      inputexpr = {f2, 1.5, Te_2, d_2, 0, 0, 1, cc_2, 0, 0}
      inputvalue = {400.0 [mm], 1.5, 3.21 [mm], 25.4 [mm], 0.0, 0.0, 1.0, 0.0, 0.0, 0.0}
      workplanesrc = pi1
      workplane = wp2
      displ = {0, 0, T_1}
      selnamepnt = Surface 1 vertex
      selshowpnt = on
      seltagpnt = pi3_unisel6
      selnamebnd = {Exterior, Surface 1, Surface 2, Edges}
      selcontributetobnd = {csel2, csel1, csel1, csel6}
      selshowbnd = {on, on, on, on}
      seltagbnd = {pi3_unisel2, pi3_unisel3, pi3_unisel4, pi3_unisel5}
      selnamedom = All
      selcontributetodom = csel4
      selshowdom = on
      seltagdom = pi3_unisel1
      argunit = {m, , m, m, , , , , , }
      lengthunit = mm
      outputwptag = {wp1, wp2, wp3}
      outputwpmatrix = 
        {0, 0, 0, 1, 0, 0, 0, 1, 0}
        {0, 0, 0.00361363229758, 1, 0, 0.00361363229758, 0, 1, 0.00361363229758}
        {0, 0, 0.000403632297579, 1, 0, 0.000403632297579, 0, 1, 0.000403632297579}
    pi4: PartInstance "Lens 3"
      part = part1
      inputname = {f, nref, Te, d, nix, niy, niz, cc, n_extra_r, n_extra_a}
      inputexpr = {f3, 1.5, Te_3, d_3, 0, 0, 1, 1, 0, 0}
      inputvalue = {50.0 [mm], 1.5, 3.21 [mm], 25.4 [mm], 0.0, 0.0, 1.0, 1.0, 0.0, 0.0}
      workplanesrc = pi3
      workplane = wp3
      displ = {0, 0, T_3}
      selnamepnt = Surface 1 vertex
      selshowpnt = on
      seltagpnt = pi4_unisel6
      selnamebnd = {Exterior, Surface 1, Surface 2, Edges}
      selcontributetobnd = {csel2, csel1, csel1, csel6}
      selshowbnd = {on, on, on, on}
      seltagbnd = {pi4_unisel2, pi4_unisel3, pi4_unisel4, pi4_unisel5}
      selnamedom = All
      selcontributetodom = csel5
      selshowdom = on
      seltagdom = pi4_unisel1
      argunit = {m, , m, m, , , , , , }
      lengthunit = mm
      outputwptag = {wp1, wp2, wp3}
      outputwpmatrix = 
        {0, 0, 0, 1, 0, 0, 0, 1, 0}
        {0, 0, 0.00667607327959, 1, 0, 0.00667607327959, 0, 1, 0.00667607327959}
        {0, 0, 0.00321, 1, 0, 0.00321, 0, 1, 0.00321}
    pi5: PartInstance "image plane"
      part = part2
      inputname = {d0, d1, nix, niy, niz}
      inputexpr = {10[mm], 0, 0, 0, 1}
      inputvalue = {10.0 [mm], 0.0 [m], 0.0, 0.0, 1.0}
      workplanesrc = pi4
      workplane = wp2
      displ = {0, 0, T_3}
      selnamebnd = All
      selcontributetobnd = csel8
      selshowbnd = on
      seltagbnd = pi5_sel1
      argunit = {m, m, , , }
      lengthunit = mm
      outputwptag = wp1
      outputwpmatrix = {0, 0, 0, 1, 0, 0, 0, 1, 0}
    fin: Finalize "Form Union"
  pgeom_gop "Geometry" (1D, length unit m)
    pt1: Point
  part1 "Spherical Plano-Convex Lens 3D" (3D, length unit m)
    pi4: PartInstance "Specify radius of curvature and center thickness 1"
      part = ipart1
      inputname = {R, Tc, d, nix, niy, niz, cc, n_extra_r, n_extra_a}
      inputexpr = {R_local, Tc_local, d, nix, niy, niz, cc, n_extra_r, n_extra_a}
      inputvalue = {0.075 [m], 0.00749932188135 [m], 0.05 [m], 0.0, 0.0, 1.0, 0.0, 0.0, 0.0}
      selnamepnt = Surface 1 vertex
      seltagpnt = pi4_sel8
      selnamebnd = {Exterior, Surface 1, Surface 2, Edges}
      seltagbnd = {pi4_sel2, pi4_sel3, pi4_sel4, pi4_sel7}
      selnamedom = All
      seltagdom = pi4_sel1
      argunit = {m, m, m, , , , , , }
      lengthunit = m
      outputwptag = {wp1, wp2, wp3}
      outputwpmatrix = 
        {0, 0, 0, 1, 0, 0, 0, 1, 0}
        {0, 0, 0.00749932188135, 1, 0, 0.00749932188135, 0, 1, 0.00749932188135}
        {0, 0, 0.00428932188135, 1, 0, 0.00428932188135, 0, 1, 0.00428932188135}
    wp1: WorkPlane "%Surface_X_vertex_intersection[lens]#1"
      planetype = transformed
      workplanesrc = pi4
      workplane = wp1
      unite = on
    wp2: WorkPlane "%Surface_X_vertex_intersection[lens]#2"
      planetype = transformed
      workplanesrc = pi4
      workplane = wp2
      unite = on
    wp3: WorkPlane "%Surface_edge[lens]" | planetype = transformed; workplanesrc = pi4; workplane = wp3; unite = on
    unisel1: UnionSelection "%All" | entitydim = 3; input = {pi4_sel1}
    unisel2: UnionSelection "%Exterior" | entitydim = 2; input = {pi4_sel2}
    unisel3: UnionSelection "%Surface_X#1" | entitydim = 2; input = {pi4_sel3}
    unisel4: UnionSelection "%Surface_X#2" | entitydim = 2; input = {pi4_sel4}
    unisel5: UnionSelection "%Edges[lens]" | entitydim = 2; input = {pi4_sel7}
    unisel6: UnionSelection "%Surface_X_vertex[lens]#1" | input = {pi4_sel8}
  ipart1 "Spherical Plano-Convex Lens 3D" (3D, length unit m)
    pch1: ParameterCheck | condition = d <= 0
    pch2: ParameterCheck | condition = Tc <= 0
    pch3: ParameterCheck | condition = Te <= 0
    pch4: ParameterCheck | condition = abs(R) > 0 && abs(R) <= 1.0025*r
    pch5: ParameterCheck | condition = cc != 0 && cc != 1
    wp1: WorkPlane "%Surface_X_vertex_intersection[lens]#1"
      contributeto = csel1
      planetype = coordinates
      genpoints = {{0, 0, 0}, {t2x, t2y, t2z}, {t1x, t1y, t1z}}
      if1: If | condition = cc == 1
      c1: Circle | r = r; angle = 360[deg]
      endif1: EndIf
    wp2: WorkPlane "%Surface_X_vertex_intersection[lens]#2"
      contributeto = csel1
      planetype = transformed
      workplane = wp1
      transdispl = {0, 0, Tc}
      unite = on
      if1: If | condition = cc == 0
      c1: Circle | r = r; angle = 360[deg]
      endif1: EndIf
    wp3: WorkPlane "%Surface_edge[lens]" | planetype = transformed; workplane = wp1; transdispl = {0, 0, dT1}; unite = on
      c1: Circle | type = curve; r = r; angle = 360[deg]
    if101: If "If phi < 1e-3" | condition = phi < 1e-3
    imp101: Import
      contributeto = csel2
      type = native
      filename = Ray_Optics_Module/3D/Spherical_Lenses/spherical_patch_1e-3.mphtxt
      meshfilename = Ray_Optics_Module/3D/Spherical_Lenses/spherical_patch_1e-3.mphtxt
    elseif102: ElseIf "Else If phi >= 1e-3 && phi < 0.01" | condition = phi >= 1e-3 && phi < 0.01
    imp102: Import
      contributeto = csel2
      type = native
      filename = Ray_Optics_Module/3D/Spherical_Lenses/spherical_patch_0.01.mphtxt
      meshfilename = Ray_Optics_Module/3D/Spherical_Lenses/spherical_patch_0.01.mphtxt
    elseif103: ElseIf "Else If phi >= 0.01 && phi < 0.1" | condition = phi >= 0.01 && phi < 0.1
    imp103: Import
      contributeto = csel2
      type = native
      filename = Ray_Optics_Module/3D/Spherical_Lenses/spherical_patch_0.1.mphtxt
      meshfilename = Ray_Optics_Module/3D/Spherical_Lenses/spherical_patch_0.1.mphtxt
    elseif104: ElseIf "Else If phi >= 0.1 && phi < 0.2" | condition = phi >= 0.1 && phi < 0.2
    imp104: Import
      contributeto = csel2
      type = native
      filename = Ray_Optics_Module/3D/Spherical_Lenses/spherical_patch_0.2.mphtxt
      meshfilename = Ray_Optics_Module/3D/Spherical_Lenses/spherical_patch_0.2.mphtxt
    elseif105: ElseIf "Else If phi >= 0.2 && phi < 0.5" | condition = phi >= 0.2 && phi < 0.5
    imp105: Import
      contributeto = csel2
      type = native
      filename = Ray_Optics_Module/3D/Spherical_Lenses/spherical_patch_0.5.mphtxt
      meshfilename = Ray_Optics_Module/3D/Spherical_Lenses/spherical_patch_0.5.mphtxt
    elseif106: ElseIf "Else If phi >= 0.5 && phi < 1.0" | condition = phi >= 0.5 && phi < 1.0
    imp106: Import
      contributeto = csel2
      type = native
      filename = Ray_Optics_Module/3D/Spherical_Lenses/spherical_patch_1.0.mphtxt
      meshfilename = Ray_Optics_Module/3D/Spherical_Lenses/spherical_patch_1.0.mphtxt
    elseif107: ElseIf "Else If phi >= 1.0 && phi < 1.5" | condition = phi >= 1.0 && phi < 1.5
    imp107: Import
      contributeto = csel2
      type = native
      filename = Ray_Optics_Module/3D/Spherical_Lenses/spherical_patch_1.5.mphtxt
      meshfilename = Ray_Optics_Module/3D/Spherical_Lenses/spherical_patch_1.5.mphtxt
    endif101: EndIf
    sca: Scale | contributeto = csel2; input = selection csel2; isotropic = abs(R/1[m]); factor = abs(R/1[m])
    mov: Move | contributeto = csel2; input = selection csel2; displx = 0; disply = 0; displz = -abs(R)+if(cc==0,0,Tc)
    if107: If "If cc == 0" | condition = cc == 0
    mir: Mirror | contributeto = csel2; input = selection csel2
    endif107: EndIf
    rot: Rotate
      contributeto = csel1
      input = selection csel2
      axis = {urx, ury, urz}
      axistype = cartesian
      rot = theta_rot[rad]
    if200: If "If n_extra_r > 0 || n_extra_a > 0" | condition = n_extra_r > 0 || n_extra_a > 0
    if201: If "If n_extra_r == 1" | condition = n_extra_r == 1
    pt1: Point | contributeto = csel3; p = {cc*Tc*n1x, cc*Tc*n1y, cc*Tc*n1z}
    elseif201: ElseIf "Else If n_extra_r > 1" | condition = n_extra_r > 1
    pol1: Polygon
      contributeto = csel3
      x = range(-r,dr,r)
      y = 0
      z = (-1)^cc*C*range(-r,dr,r)^2/(1 + sqrt(1 - C^2*range(-r,dr,r)^2))+cc*Tc
    pol2: Polygon
      contributeto = csel3
      x = 0
      y = range(-r,dr,r)
      z = (-1)^cc*C*range(-r,dr,r)^2/(1 + sqrt(1 - C^2*range(-r,dr,r)^2))+cc*Tc
    endif201: EndIf
    if202: If "If n_extra_a > 0" | condition = n_extra_a > 0
    pol3: Polygon
      contributeto = csel3
      x = r*cos(range(0,2*pi/(4*(n_extra_a+1)),2*pi))
      y = r*sin(range(0,2*pi/(4*(n_extra_a+1)),2*pi))
      z = dT1
    endif202: EndIf
    cpt1: ConvertToPoint | contributeto = csel3; input = selection csel3
    rot1: Rotate
      contributeto = csel1
      input = selection csel3
      axis = {urx, ury, urz}
      axistype = cartesian
      rot = theta_rot[rad]
    endif200: EndIf
    ext1: Extrude | contributeto = csel1; workplane = wp3; input = wp3; distance = {-Te, Te}; baseid = {3, 1, 0, 4, 2}
    csol1: ConvertToSolid | contributeto = csel1; input = selection csel1
    ballsel1: BallSelection | entitydim = 2; r = d/1e4
    ballsel2: BallSelection | entitydim = 2; posx = Tc*n1x; posy = Tc*n1y; posz = Tc*n1z; r = d/1e4
    ballsel3: BallSelection | posx = cc*Tc*n1x; posy = cc*Tc*n1y; posz = cc*Tc*n1z; r = d/1e4
    comsel2: ComplementSelection | entitydim = 2; input = {ballsel1, ballsel2}
    sel1: UnionSelection "%All" | entitydim = 3; input = {csel1.dom}
    sel2: UnionSelection "%Exterior" | entitydim = 2; input = {csel1.bnd}
    sel3: UnionSelection "%Surface_X#1" | entitydim = 2; input = {ballsel1}
    sel4: UnionSelection "%Surface_X#2" | entitydim = 2; input = {ballsel2}
    sel7: UnionSelection "%Edges[lens]" | entitydim = 2; input = {comsel2}
    sel8: UnionSelection "%Surface_X_vertex[lens]#1" | input = {ballsel3}
  part2 "Circular Planar Annulus" (3D, length unit m)
    pch1: ParameterCheck | condition = d0<0
    pch2: ParameterCheck | condition = d1<0
    pch3: ParameterCheck | condition = d0<d1
    wp1: WorkPlane "%Surface" | planetype = normalvector; normalvector = {nix, niy, niz}; unite = on
      c1: Circle | r = d0/2
      if1: If | condition = d1 > 0
      c2: Circle | r = d1/2
      dif1: Difference | input = c1; input2 = c2
      endif1: EndIf
    sel1: ExplicitSelection "%All" | selection = wp1.dif1 boundaries 1

Materials
  mat1: Common "Schott N-SF5" on selection geom1_csel3_dom
    RefractiveIndex
      ki = k_interp(c_const/freq)
      int2: Interpolation "Refractive index, imaginary part"
        funcname = k_interp
        table = 
          {3.7E-7, 3.791E-6}
          {3.8e-07, 1.341E-6}
          {3.9e-07, 5.9344E-7}
          {4.0E-7, 3.1635E-7}
          {4.05E-7, 2.4021E-7}
          {4.2e-07, 1.2608E-7}
          {4.36E-7, 9.3274E-8}
          {4.6E-7, 6.5886E-8}
          {5.0E-7, 3.8663E-8}
          {5.46E-7, 2.0982E-8}
          {5.8E-7, 1.6691E-8}
          {6.2E-7, 2.3825E-8}
          {6.6E-7, 2.749E-8}
          {7.0E-7, 2.4646E-8}
          {1.06E-6, 2.0305E-8}
          {1.53E-6, 1.233E-7}
          {1.97e-06, 8.0161E-7}
          {2.325E-6, 3.4194E-6}
          {2.5e-06, 5.5159E-6}
        interp = piecewisecubic
        argunit = m
        fununit = 1
    DispersionModelSellmeierStandard "Sellmeier"
      ODsma = {1.52481889, 0.187085527, 1.42729015, 0.011254756, 0.0588995392, 129.141675}
      Trefsma = 22[degC]
      Prefsma = 1[atm]
    ThermoOpticDispersionModelSchott "Schott thermo-optic"
      TOsco = {-2.51e-07, 1.07e-08, -2.4e-11, 7.85e-07, 1.15e-09, 0.278}
      Trefsco = 20[degC]
  mat2: Common "Schott N-SF5.1" on selection geom1_csel4_dom
    // same settings as mat1
  mat3: Common "Schott N-SF5.2" on selection geom1_csel5_dom
    // same settings as mat1

Physics
  gop: GeometricalOptics on all domains
    dependent variable q = {qx, qy, qz}
    mp1: MediumProperties (default) | RefractiveIndexDomains = GetDispersionModelFromMaterial
    matd1: MaterialDiscontinuity (default) | ReleaseReflectedRays = Never
    op1: RayProperties | lambda0 = lambda
    relg1: ReleaseGrid "Release from Grid 1"
      GridType = Hexapolar
      qcc = {dx, dy, dz}
      rcc = {nix, niy, niz}
      Rc = D_in/2
      Ncr = N_ring
      L0 = {vx, vy, vz}
    wall1: Wall "Obstructions" on selection geom1_csel6_bnd | WallCondition = Disappear
    wall2: Wall "Stop" on selection geom1_csel7_bnd | WallCondition = Disappear
    wall3: Wall "Image" on selection geom1_csel8_bnd

Mesh
  mesh1 "Mesh 1" (physics-controlled)
    size: MeshSizeDefault | hauto = 3

Studies
  std1 "Study 1"
    rtrac: RayTracing | timestepspec = specifylength; tlist = range(0,0.01,1); lunit = mm; llist = {0, 650}